*HEADING
OpenSG-RM plate from layup_db.yaml (model 1)
*NODE
1, 0.00000000, 0.00000000, 0.0
2, 0.07620000, 0.00000000, 0.0
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*ELEMENT, TYPE=S4, ELSET=EALL
1, 1, 2, 23, 22
2, 2, 3, 24, 23
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*NSET, NSET=NX0
1, 22, 43, 64, 85, 106
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*NSET, NSET=NXA
21, 42, 63, 84, 105, 126
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*NSET, NSET=NY0
1, 2, 3, 4, 5, 6
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*NSET, NSET=NYB
421, 422, 423, 424, 425, 426
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*NSET, NSET=NALL, GENERATE
1, 441, 1
*NSET, NSET=NCEN
221
*SHELL GENERAL SECTION, ELSET=EALL, DENSITY=30.2514
5.491650e+08, 2.641702e+07, 5.491650e+08, 1.552461e-10, 2.728769e-08, 4.137660e+07, 3.618296e-06, 3.581560e-06
3.750560e-25, 3.000546e+06, 3.612293e-06, 3.590136e-06, 4.025233e-25, 1.256596e+05, 2.937114e+06, 1.024401e-24
9.499044e-25, 2.787183e-10, 8.461209e-13, 1.487231e-10, 2.011171e+05
*TRANSVERSE SHEAR STIFFNESS
7.700977e+06, 7.542371e+06, -9.739481e-09
** SS-1: v=w=0 on the x-edges, u=w=0 on the y-edges, drilling fixed
*BOUNDARY
NX0, 2, 3
NXA, 2, 3
NY0, 1, 1
NYB, 1, 1
NY0, 3, 3
NYB, 3, 3
NALL, 6, 6
*STEP, NAME=PULSE, INC=800
*DYNAMIC
5e-05, 0.02, 5e-09, 5e-05
*DLOAD
1, P, 4.244297e+05
2, P, 1.262838e+06
3, P, 2.070151e+06
4, P, 2.826491e+06
5, P, 3.513232e+06
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400, P, 4.244297e+05
*NODE PRINT, NSET=NCEN, FREQUENCY=1
U
*END STEP
